<?xml version="1.0"?>

<!-- Automatically generated from APC public data
Used 8000 RPM to correspond with the maximum
RPM for our motor, between 8000 and 9000

 -->

<propeller name="APC_15x8E">
	<ixx>0.00278</ixx>
	<diameter unit="IN">15.0</diameter>
	<numblades>2</numblades>
	<minpitch>8.0</minpitch>
	<maxpitch>8.0</maxpitch>
	<table name="C_THRUST" type="internal">
		<tableData>
			0.0 0.0908
			0.0234 0.0895
			0.0468 0.088
			0.0702 0.0865
			0.0936 0.0848
			0.1169 0.083
			0.1403 0.0811
			0.1637 0.079
			0.1871 0.0767
			0.2105 0.0743
			0.2339 0.0717
			0.2573 0.069
			0.2807 0.0661
			0.304 0.063
			0.3274 0.0598
			0.3508 0.0564
			0.3742 0.0528
			0.3976 0.0491
			0.421 0.0453
			0.4444 0.0414
			0.4678 0.0374
			0.4911 0.0333
			0.5145 0.0291
			0.5379 0.0249
			0.5613 0.0207
			0.5847 0.0164
			0.6081 0.0122
			0.6315 0.0081
			0.6549 0.004
			0.6782 -0.0001
		</tableData>
	</table>
	<table name="C_POWER" type="internal">
		<tableData>
			0.0 0.0298
			0.0234 0.0302
			0.0468 0.0306
			0.0702 0.031
			0.0936 0.0313
			0.1169 0.0316
			0.1403 0.0319
			0.1637 0.032
			0.1871 0.0321
			0.2105 0.0321
			0.2339 0.032
			0.2573 0.0318
			0.2807 0.0314
			0.304 0.031
			0.3274 0.0303
			0.3508 0.0296
			0.3742 0.0287
			0.3976 0.0277
			0.421 0.0265
			0.4444 0.0252
			0.4678 0.0237
			0.4911 0.0221
			0.5145 0.0204
			0.5379 0.0185
			0.5613 0.0166
			0.5847 0.0145
			0.6081 0.0124
			0.6315 0.0101
			0.6549 0.0078
			0.6782 0.0055
		</tableData>
	</table>
</propeller>
