<aerodynamics>
  <function name="aero/velocities/wing-zi-fps">
    <product>
      <max>
        <value> 0 </value>
        <property> velocities/u-aero-fps </property>
      </max>
      <value> 0.5 </value>
      <sum>
        <property> aero/coefficients/CL_lw0 </property>
        <property> aero/coefficients/CL_rw0 </property>
        <property> aero/coefficients/CL_lw1 </property>
        <property> aero/coefficients/CL_rw1 </property>
      </sum>
      <value> 0.0464 </value>
    </product>
  </function>
  <function name="aero/quantity/x_lw0-ft">
    <value> 0.0798293963254593 </value>
  </function>
  <function name="aero/quantity/y_lw0-ft">
    <value> -2.4606299212598426 </value>
  </function>
  <function name="aero/quantity/z_lw0-ft">
    <value> 0.0 </value>
  </function>
  <function name="aero/coefficients/CD0_lw0">
    <value> 0.0118 </value>
  </function>
  <function name="aero/coefficients/k_lw0">
    <value> 0.0464 </value>
  </function>
  <function name="aero/metrics/S_lw0-sqft">
    <value> 4.197925062516792 </value>
  </function>
  <function name="aero/velocities/prop-lw0-ui-fps">
    <value> 0.0 </value>
  </function>
  <function name="aero/velocities/wing-lw0-zi-fps">
    <value> 0.0 </value>
  </function>
  <function name="aero/calculated/delta-alpha_lw0_None-rad">
    <value> 0.0 </value>
  </function>
  <function name="aero/velocities/U_lw0_bf-fps">
    <sum>
      <property> velocities/u-aero-fps </property>
      <product>
        <property> velocities/q-aero-rad_sec </property>
        <property> aero/quantity/z_lw0-ft </property>
      </product>
      <product>
        <value> -1.0 </value>
        <property> velocities/r-aero-rad_sec </property>
        <property> aero/quantity/y_lw0-ft </property>
      </product>
      <property> aero/velocities/prop-lw0-ui-fps </property>
    </sum>
  </function>
  <function name="aero/velocities/V_lw0_bf-fps">
    <sum>
      <property> velocities/v-aero-fps </property>
      <product>
        <property> velocities/r-aero-rad_sec </property>
        <property> aero/quantity/x_lw0-ft </property>
      </product>
      <product>
        <value> -1.0 </value>
        <property> velocities/p-aero-rad_sec </property>
        <property> aero/quantity/z_lw0-ft </property>
      </product>
    </sum>
  </function>
  <function name="aero/velocities/W_lw0_bf-fps">
    <sum>
      <property> velocities/w-aero-fps </property>
      <product>
        <property> velocities/p-aero-rad_sec </property>
        <property> aero/quantity/y_lw0-ft </property>
      </product>
      <product>
        <value> -1.0 </value>
        <property> velocities/q-aero-rad_sec </property>
        <property> aero/quantity/x_lw0-ft </property>
      </product>
      <property> aero/velocities/wing-lw0-zi-fps </property>
    </sum>
  </function>
  <function name="aero/velocities/U_lw0_wf-fps">
    <sum>
      <product>
        <value> 1.0 </value>
        <property> aero/velocities/U_lw0_bf-fps </property>
      </product>
      <product>
        <value> 0.0 </value>
        <property> aero/velocities/V_lw0_bf-fps </property>
      </product>
      <product>
        <value> 0.0 </value>
        <property> aero/velocities/W_lw0_bf-fps </property>
      </product>
    </sum>
  </function>
  <function name="aero/velocities/W_lw0_wf-fps">
    <sum>
      <product>
        <value> 0.0 </value>
        <property> aero/velocities/U_lw0_bf-fps </property>
      </product>
      <product>
        <value> 0.0 </value>
        <property> aero/velocities/V_lw0_bf-fps </property>
      </product>
      <product>
        <value> 1.0 </value>
        <property> aero/velocities/W_lw0_bf-fps </property>
      </product>
    </sum>
  </function>
  <function name="aero/calculated/qbar_lw0-psf">
    <product>
      <value> 0.5 </value>
      <property> atmosphere/rho-slugs_ft3 </property>
      <sum>
        <pow>
          <property> aero/velocities/U_lw0_wf-fps </property>
          <value> 2 </value>
        </pow>
        <pow>
          <property> aero/velocities/W_lw0_wf-fps </property>
          <value> 2 </value>
        </pow>
      </sum>
    </product>
  </function>
  <function name="aero/calculated/alpha_lw0-rad">
    <sum>
      <atan2>
        <property> aero/velocities/W_lw0_wf-fps </property>
        <property> aero/velocities/U_lw0_wf-fps </property>
      </atan2>
      <property> aero/calculated/delta-alpha_lw0_None-rad </property>
    </sum>
  </function>
  <function name="aero/coefficients/CL_lw0">
    <table name="aero/table/CL_lw0_alpha">
      <independentVar lookup="row"> aero/calculated/alpha_lw0-rad </independentVar>
      <tableData>
-1.57                 0
-0.21305442572147976  -1.1
0.21305442572147976   1.1
1.57                  0
 </tableData>
    </table>
  </function>
  <function name="aero/coefficients/CD-sep_lw0">
    <table name="aero/table/CD-sep_lw0_alpha">
      <independentVar lookup="row"> aero/calculated/alpha_lw0-rad </independentVar>
      <tableData>
-1.57                 1
-0.21305442572147976  0
0.21305442572147976   0
1.57                  1
 </tableData>
    </table>
  </function>
  <function name="aero/coefficients/CD_lw0">
    <sum>
      <property> aero/coefficients/CD0_lw0 </property>
      <product>
        <property> aero/coefficients/k_lw0 </property>
        <pow>
          <property> aero/coefficients/CL_lw0 </property>
          <value> 2 </value>
        </pow>
      </product>
      <property> aero/coefficients/CD-sep_lw0 </property>
    </sum>
  </function>
  <function name="aero/forces/L_lw0-lb">
    <product>
      <property> aero/coefficients/CL_lw0 </property>
      <property> aero/metrics/S_lw0-sqft </property>
      <property> aero/calculated/qbar_lw0-psf </property>
    </product>
  </function>
  <function name="aero/forces/D_lw0-lb">
    <product>
      <property> aero/coefficients/CD_lw0 </property>
      <property> aero/metrics/S_lw0-sqft </property>
      <property> aero/calculated/qbar_lw0-psf </property>
    </product>
  </function>
  <function name="aero/forces/X_lw0_wf-lb">
    <sum>
      <product>
        <property> aero/forces/L_lw0-lb </property>
        <sin>
          <property> aero/calculated/alpha_lw0-rad </property>
        </sin>
      </product>
      <product>
        <value> -1.0 </value>
        <property> aero/forces/D_lw0-lb </property>
        <cos>
          <property> aero/calculated/alpha_lw0-rad </property>
        </cos>
      </product>
    </sum>
  </function>
  <function name="aero/forces/Z_lw0_wf-lb">
    <sum>
      <product>
        <value> -1.0 </value>
        <property> aero/forces/L_lw0-lb </property>
        <cos>
          <property> aero/calculated/alpha_lw0-rad </property>
        </cos>
      </product>
      <product>
        <value> -1.0 </value>
        <property> aero/forces/D_lw0-lb </property>
        <sin>
          <property> aero/calculated/alpha_lw0-rad </property>
        </sin>
      </product>
    </sum>
  </function>
  <function name="aero/quantity/x_lw1-ft">
    <value> 0.19465879265091862 </value>
  </function>
  <function name="aero/quantity/y_lw1-ft">
    <value> -4.678477690288714 </value>
  </function>
  <function name="aero/quantity/z_lw1-ft">
    <value> 0.0 </value>
  </function>
  <function name="aero/coefficients/CD0_lw1">
    <value> 0.0118 </value>
  </function>
  <function name="aero/coefficients/k_lw1">
    <value> 0.0464 </value>
  </function>
  <function name="aero/metrics/S_lw1-sqft">
    <value> 3.8750077500155005 </value>
  </function>
  <function name="aero/velocities/prop-lw1-ui-fps">
    <value> 0.0 </value>
  </function>
  <function name="aero/velocities/wing-lw1-zi-fps">
    <value> 0.0 </value>
  </function>
  <function name="aero/calculated/delta-alpha_lw1_left-aileron-rad">
    <product>
      <value> 0.7 </value>
      <property> fcs/left-aileron-pos-rad </property>
    </product>
  </function>
  <function name="aero/velocities/U_lw1_bf-fps">
    <sum>
      <property> velocities/u-aero-fps </property>
      <product>
        <property> velocities/q-aero-rad_sec </property>
        <property> aero/quantity/z_lw1-ft </property>
      </product>
      <product>
        <value> -1.0 </value>
        <property> velocities/r-aero-rad_sec </property>
        <property> aero/quantity/y_lw1-ft </property>
      </product>
      <property> aero/velocities/prop-lw1-ui-fps </property>
    </sum>
  </function>
  <function name="aero/velocities/V_lw1_bf-fps">
    <sum>
      <property> velocities/v-aero-fps </property>
      <product>
        <property> velocities/r-aero-rad_sec </property>
        <property> aero/quantity/x_lw1-ft </property>
      </product>
      <product>
        <value> -1.0 </value>
        <property> velocities/p-aero-rad_sec </property>
        <property> aero/quantity/z_lw1-ft </property>
      </product>
    </sum>
  </function>
  <function name="aero/velocities/W_lw1_bf-fps">
    <sum>
      <property> velocities/w-aero-fps </property>
      <product>
        <property> velocities/p-aero-rad_sec </property>
        <property> aero/quantity/y_lw1-ft </property>
      </product>
      <product>
        <value> -1.0 </value>
        <property> velocities/q-aero-rad_sec </property>
        <property> aero/quantity/x_lw1-ft </property>
      </product>
      <property> aero/velocities/wing-lw1-zi-fps </property>
    </sum>
  </function>
  <function name="aero/velocities/U_lw1_wf-fps">
    <sum>
      <product>
        <value> 1.0 </value>
        <property> aero/velocities/U_lw1_bf-fps </property>
      </product>
      <product>
        <value> 0.0 </value>
        <property> aero/velocities/V_lw1_bf-fps </property>
      </product>
      <product>
        <value> 0.0 </value>
        <property> aero/velocities/W_lw1_bf-fps </property>
      </product>
    </sum>
  </function>
  <function name="aero/velocities/W_lw1_wf-fps">
    <sum>
      <product>
        <value> 0.0 </value>
        <property> aero/velocities/U_lw1_bf-fps </property>
      </product>
      <product>
        <value> 0.0 </value>
        <property> aero/velocities/V_lw1_bf-fps </property>
      </product>
      <product>
        <value> 1.0 </value>
        <property> aero/velocities/W_lw1_bf-fps </property>
      </product>
    </sum>
  </function>
  <function name="aero/calculated/qbar_lw1-psf">
    <product>
      <value> 0.5 </value>
      <property> atmosphere/rho-slugs_ft3 </property>
      <sum>
        <pow>
          <property> aero/velocities/U_lw1_wf-fps </property>
          <value> 2 </value>
        </pow>
        <pow>
          <property> aero/velocities/W_lw1_wf-fps </property>
          <value> 2 </value>
        </pow>
      </sum>
    </product>
  </function>
  <function name="aero/calculated/alpha_lw1-rad">
    <sum>
      <atan2>
        <property> aero/velocities/W_lw1_wf-fps </property>
        <property> aero/velocities/U_lw1_wf-fps </property>
      </atan2>
      <property> aero/calculated/delta-alpha_lw1_left-aileron-rad </property>
    </sum>
  </function>
  <function name="aero/coefficients/CL_lw1">
    <table name="aero/table/CL_lw1_alpha">
      <independentVar lookup="row"> aero/calculated/alpha_lw1-rad </independentVar>
      <tableData>
-1.57                 0
-0.21305442572147976  -1.1
0.21305442572147976   1.1
1.57                  0
 </tableData>
    </table>
  </function>
  <function name="aero/coefficients/CD-sep_lw1">
    <table name="aero/table/CD-sep_lw1_alpha">
      <independentVar lookup="row"> aero/calculated/alpha_lw1-rad </independentVar>
      <tableData>
-1.57                 1
-0.21305442572147976  0
0.21305442572147976   0
1.57                  1
 </tableData>
    </table>
  </function>
  <function name="aero/coefficients/CD_lw1">
    <sum>
      <property> aero/coefficients/CD0_lw1 </property>
      <product>
        <property> aero/coefficients/k_lw1 </property>
        <pow>
          <property> aero/coefficients/CL_lw1 </property>
          <value> 2 </value>
        </pow>
      </product>
      <property> aero/coefficients/CD-sep_lw1 </property>
    </sum>
  </function>
  <function name="aero/forces/L_lw1-lb">
    <product>
      <property> aero/coefficients/CL_lw1 </property>
      <property> aero/metrics/S_lw1-sqft </property>
      <property> aero/calculated/qbar_lw1-psf </property>
    </product>
  </function>
  <function name="aero/forces/D_lw1-lb">
    <product>
      <property> aero/coefficients/CD_lw1 </property>
      <property> aero/metrics/S_lw1-sqft </property>
      <property> aero/calculated/qbar_lw1-psf </property>
    </product>
  </function>
  <function name="aero/forces/X_lw1_wf-lb">
    <sum>
      <product>
        <property> aero/forces/L_lw1-lb </property>
        <sin>
          <property> aero/calculated/alpha_lw1-rad </property>
        </sin>
      </product>
      <product>
        <value> -1.0 </value>
        <property> aero/forces/D_lw1-lb </property>
        <cos>
          <property> aero/calculated/alpha_lw1-rad </property>
        </cos>
      </product>
    </sum>
  </function>
  <function name="aero/forces/Z_lw1_wf-lb">
    <sum>
      <product>
        <value> -1.0 </value>
        <property> aero/forces/L_lw1-lb </property>
        <cos>
          <property> aero/calculated/alpha_lw1-rad </property>
        </cos>
      </product>
      <product>
        <value> -1.0 </value>
        <property> aero/forces/D_lw1-lb </property>
        <sin>
          <property> aero/calculated/alpha_lw1-rad </property>
        </sin>
      </product>
    </sum>
  </function>
  <function name="aero/quantity/x_rw0-ft">
    <value> 0.0798293963254593 </value>
  </function>
  <function name="aero/quantity/y_rw0-ft">
    <value> 2.4606299212598426 </value>
  </function>
  <function name="aero/quantity/z_rw0-ft">
    <value> 0.0 </value>
  </function>
  <function name="aero/coefficients/CD0_rw0">
    <value> 0.0118 </value>
  </function>
  <function name="aero/coefficients/k_rw0">
    <value> 0.0464 </value>
  </function>
  <function name="aero/metrics/S_rw0-sqft">
    <value> 4.197925062516792 </value>
  </function>
  <function name="aero/velocities/prop-rw0-ui-fps">
    <value> 0.0 </value>
  </function>
  <function name="aero/velocities/wing-rw0-zi-fps">
    <value> 0.0 </value>
  </function>
  <function name="aero/calculated/delta-alpha_rw0_None-rad">
    <value> 0.0 </value>
  </function>
  <function name="aero/velocities/U_rw0_bf-fps">
    <sum>
      <property> velocities/u-aero-fps </property>
      <product>
        <property> velocities/q-aero-rad_sec </property>
        <property> aero/quantity/z_rw0-ft </property>
      </product>
      <product>
        <value> -1.0 </value>
        <property> velocities/r-aero-rad_sec </property>
        <property> aero/quantity/y_rw0-ft </property>
      </product>
      <property> aero/velocities/prop-rw0-ui-fps </property>
    </sum>
  </function>
  <function name="aero/velocities/V_rw0_bf-fps">
    <sum>
      <property> velocities/v-aero-fps </property>
      <product>
        <property> velocities/r-aero-rad_sec </property>
        <property> aero/quantity/x_rw0-ft </property>
      </product>
      <product>
        <value> -1.0 </value>
        <property> velocities/p-aero-rad_sec </property>
        <property> aero/quantity/z_rw0-ft </property>
      </product>
    </sum>
  </function>
  <function name="aero/velocities/W_rw0_bf-fps">
    <sum>
      <property> velocities/w-aero-fps </property>
      <product>
        <property> velocities/p-aero-rad_sec </property>
        <property> aero/quantity/y_rw0-ft </property>
      </product>
      <product>
        <value> -1.0 </value>
        <property> velocities/q-aero-rad_sec </property>
        <property> aero/quantity/x_rw0-ft </property>
      </product>
      <property> aero/velocities/wing-rw0-zi-fps </property>
    </sum>
  </function>
  <function name="aero/velocities/U_rw0_wf-fps">
    <sum>
      <product>
        <value> 1.0 </value>
        <property> aero/velocities/U_rw0_bf-fps </property>
      </product>
      <product>
        <value> 0.0 </value>
        <property> aero/velocities/V_rw0_bf-fps </property>
      </product>
      <product>
        <value> 0.0 </value>
        <property> aero/velocities/W_rw0_bf-fps </property>
      </product>
    </sum>
  </function>
  <function name="aero/velocities/W_rw0_wf-fps">
    <sum>
      <product>
        <value> 0.0 </value>
        <property> aero/velocities/U_rw0_bf-fps </property>
      </product>
      <product>
        <value> 0.0 </value>
        <property> aero/velocities/V_rw0_bf-fps </property>
      </product>
      <product>
        <value> 1.0 </value>
        <property> aero/velocities/W_rw0_bf-fps </property>
      </product>
    </sum>
  </function>
  <function name="aero/calculated/qbar_rw0-psf">
    <product>
      <value> 0.5 </value>
      <property> atmosphere/rho-slugs_ft3 </property>
      <sum>
        <pow>
          <property> aero/velocities/U_rw0_wf-fps </property>
          <value> 2 </value>
        </pow>
        <pow>
          <property> aero/velocities/W_rw0_wf-fps </property>
          <value> 2 </value>
        </pow>
      </sum>
    </product>
  </function>
  <function name="aero/calculated/alpha_rw0-rad">
    <sum>
      <atan2>
        <property> aero/velocities/W_rw0_wf-fps </property>
        <property> aero/velocities/U_rw0_wf-fps </property>
      </atan2>
      <property> aero/calculated/delta-alpha_rw0_None-rad </property>
    </sum>
  </function>
  <function name="aero/coefficients/CL_rw0">
    <table name="aero/table/CL_rw0_alpha">
      <independentVar lookup="row"> aero/calculated/alpha_rw0-rad </independentVar>
      <tableData>
-1.57                 0
-0.21305442572147976  -1.1
0.21305442572147976   1.1
1.57                  0
 </tableData>
    </table>
  </function>
  <function name="aero/coefficients/CD-sep_rw0">
    <table name="aero/table/CD-sep_rw0_alpha">
      <independentVar lookup="row"> aero/calculated/alpha_rw0-rad </independentVar>
      <tableData>
-1.57                 1
-0.21305442572147976  0
0.21305442572147976   0
1.57                  1
 </tableData>
    </table>
  </function>
  <function name="aero/coefficients/CD_rw0">
    <sum>
      <property> aero/coefficients/CD0_rw0 </property>
      <product>
        <property> aero/coefficients/k_rw0 </property>
        <pow>
          <property> aero/coefficients/CL_rw0 </property>
          <value> 2 </value>
        </pow>
      </product>
      <property> aero/coefficients/CD-sep_rw0 </property>
    </sum>
  </function>
  <function name="aero/forces/L_rw0-lb">
    <product>
      <property> aero/coefficients/CL_rw0 </property>
      <property> aero/metrics/S_rw0-sqft </property>
      <property> aero/calculated/qbar_rw0-psf </property>
    </product>
  </function>
  <function name="aero/forces/D_rw0-lb">
    <product>
      <property> aero/coefficients/CD_rw0 </property>
      <property> aero/metrics/S_rw0-sqft </property>
      <property> aero/calculated/qbar_rw0-psf </property>
    </product>
  </function>
  <function name="aero/forces/X_rw0_wf-lb">
    <sum>
      <product>
        <property> aero/forces/L_rw0-lb </property>
        <sin>
          <property> aero/calculated/alpha_rw0-rad </property>
        </sin>
      </product>
      <product>
        <value> -1.0 </value>
        <property> aero/forces/D_rw0-lb </property>
        <cos>
          <property> aero/calculated/alpha_rw0-rad </property>
        </cos>
      </product>
    </sum>
  </function>
  <function name="aero/forces/Z_rw0_wf-lb">
    <sum>
      <product>
        <value> -1.0 </value>
        <property> aero/forces/L_rw0-lb </property>
        <cos>
          <property> aero/calculated/alpha_rw0-rad </property>
        </cos>
      </product>
      <product>
        <value> -1.0 </value>
        <property> aero/forces/D_rw0-lb </property>
        <sin>
          <property> aero/calculated/alpha_rw0-rad </property>
        </sin>
      </product>
    </sum>
  </function>
  <function name="aero/quantity/x_rw1-ft">
    <value> 0.0798293963254593 </value>
  </function>
  <function name="aero/quantity/y_rw1-ft">
    <value> 4.678477690288714 </value>
  </function>
  <function name="aero/quantity/z_rw1-ft">
    <value> 0.0 </value>
  </function>
  <function name="aero/coefficients/CD0_rw1">
    <value> 0.0118 </value>
  </function>
  <function name="aero/coefficients/k_rw1">
    <value> 0.0464 </value>
  </function>
  <function name="aero/metrics/S_rw1-sqft">
    <value> 3.8750077500155005 </value>
  </function>
  <function name="aero/velocities/prop-rw1-ui-fps">
    <value> 0.0 </value>
  </function>
  <function name="aero/velocities/wing-rw1-zi-fps">
    <value> 0.0 </value>
  </function>
  <function name="aero/calculated/delta-alpha_rw1_right-aileron-rad">
    <product>
      <value> 0.7 </value>
      <property> fcs/right-aileron-pos-rad </property>
    </product>
  </function>
  <function name="aero/velocities/U_rw1_bf-fps">
    <sum>
      <property> velocities/u-aero-fps </property>
      <product>
        <property> velocities/q-aero-rad_sec </property>
        <property> aero/quantity/z_rw1-ft </property>
      </product>
      <product>
        <value> -1.0 </value>
        <property> velocities/r-aero-rad_sec </property>
        <property> aero/quantity/y_rw1-ft </property>
      </product>
      <property> aero/velocities/prop-rw1-ui-fps </property>
    </sum>
  </function>
  <function name="aero/velocities/V_rw1_bf-fps">
    <sum>
      <property> velocities/v-aero-fps </property>
      <product>
        <property> velocities/r-aero-rad_sec </property>
        <property> aero/quantity/x_rw1-ft </property>
      </product>
      <product>
        <value> -1.0 </value>
        <property> velocities/p-aero-rad_sec </property>
        <property> aero/quantity/z_rw1-ft </property>
      </product>
    </sum>
  </function>
  <function name="aero/velocities/W_rw1_bf-fps">
    <sum>
      <property> velocities/w-aero-fps </property>
      <product>
        <property> velocities/p-aero-rad_sec </property>
        <property> aero/quantity/y_rw1-ft </property>
      </product>
      <product>
        <value> -1.0 </value>
        <property> velocities/q-aero-rad_sec </property>
        <property> aero/quantity/x_rw1-ft </property>
      </product>
      <property> aero/velocities/wing-rw1-zi-fps </property>
    </sum>
  </function>
  <function name="aero/velocities/U_rw1_wf-fps">
    <sum>
      <product>
        <value> 1.0 </value>
        <property> aero/velocities/U_rw1_bf-fps </property>
      </product>
      <product>
        <value> 0.0 </value>
        <property> aero/velocities/V_rw1_bf-fps </property>
      </product>
      <product>
        <value> 0.0 </value>
        <property> aero/velocities/W_rw1_bf-fps </property>
      </product>
    </sum>
  </function>
  <function name="aero/velocities/W_rw1_wf-fps">
    <sum>
      <product>
        <value> 0.0 </value>
        <property> aero/velocities/U_rw1_bf-fps </property>
      </product>
      <product>
        <value> 0.0 </value>
        <property> aero/velocities/V_rw1_bf-fps </property>
      </product>
      <product>
        <value> 1.0 </value>
        <property> aero/velocities/W_rw1_bf-fps </property>
      </product>
    </sum>
  </function>
  <function name="aero/calculated/qbar_rw1-psf">
    <product>
      <value> 0.5 </value>
      <property> atmosphere/rho-slugs_ft3 </property>
      <sum>
        <pow>
          <property> aero/velocities/U_rw1_wf-fps </property>
          <value> 2 </value>
        </pow>
        <pow>
          <property> aero/velocities/W_rw1_wf-fps </property>
          <value> 2 </value>
        </pow>
      </sum>
    </product>
  </function>
  <function name="aero/calculated/alpha_rw1-rad">
    <sum>
      <atan2>
        <property> aero/velocities/W_rw1_wf-fps </property>
        <property> aero/velocities/U_rw1_wf-fps </property>
      </atan2>
      <property> aero/calculated/delta-alpha_rw1_right-aileron-rad </property>
    </sum>
  </function>
  <function name="aero/coefficients/CL_rw1">
    <table name="aero/table/CL_rw1_alpha">
      <independentVar lookup="row"> aero/calculated/alpha_rw1-rad </independentVar>
      <tableData>
-1.57                 0
-0.21305442572147976  -1.1
0.21305442572147976   1.1
1.57                  0
 </tableData>
    </table>
  </function>
  <function name="aero/coefficients/CD-sep_rw1">
    <table name="aero/table/CD-sep_rw1_alpha">
      <independentVar lookup="row"> aero/calculated/alpha_rw1-rad </independentVar>
      <tableData>
-1.57                 1
-0.21305442572147976  0
0.21305442572147976   0
1.57                  1
 </tableData>
    </table>
  </function>
  <function name="aero/coefficients/CD_rw1">
    <sum>
      <property> aero/coefficients/CD0_rw1 </property>
      <product>
        <property> aero/coefficients/k_rw1 </property>
        <pow>
          <property> aero/coefficients/CL_rw1 </property>
          <value> 2 </value>
        </pow>
      </product>
      <property> aero/coefficients/CD-sep_rw1 </property>
    </sum>
  </function>
  <function name="aero/forces/L_rw1-lb">
    <product>
      <property> aero/coefficients/CL_rw1 </property>
      <property> aero/metrics/S_rw1-sqft </property>
      <property> aero/calculated/qbar_rw1-psf </property>
    </product>
  </function>
  <function name="aero/forces/D_rw1-lb">
    <product>
      <property> aero/coefficients/CD_rw1 </property>
      <property> aero/metrics/S_rw1-sqft </property>
      <property> aero/calculated/qbar_rw1-psf </property>
    </product>
  </function>
  <function name="aero/forces/X_rw1_wf-lb">
    <sum>
      <product>
        <property> aero/forces/L_rw1-lb </property>
        <sin>
          <property> aero/calculated/alpha_rw1-rad </property>
        </sin>
      </product>
      <product>
        <value> -1.0 </value>
        <property> aero/forces/D_rw1-lb </property>
        <cos>
          <property> aero/calculated/alpha_rw1-rad </property>
        </cos>
      </product>
    </sum>
  </function>
  <function name="aero/forces/Z_rw1_wf-lb">
    <sum>
      <product>
        <value> -1.0 </value>
        <property> aero/forces/L_rw1-lb </property>
        <cos>
          <property> aero/calculated/alpha_rw1-rad </property>
        </cos>
      </product>
      <product>
        <value> -1.0 </value>
        <property> aero/forces/D_rw1-lb </property>
        <sin>
          <property> aero/calculated/alpha_rw1-rad </property>
        </sin>
      </product>
    </sum>
  </function>
  <function name="aero/quantity/x_ht-ft">
    <value> -3.8537992125984264 </value>
  </function>
  <function name="aero/quantity/y_ht-ft">
    <value> 0.0 </value>
  </function>
  <function name="aero/quantity/z_ht-ft">
    <value> 0.0 </value>
  </function>
  <function name="aero/coefficients/CD0_ht">
    <value> 0.0136 </value>
  </function>
  <function name="aero/coefficients/k_ht">
    <value> 0.0513 </value>
  </function>
  <function name="aero/metrics/S_ht-sqft">
    <value> 2.7986167083445284 </value>
  </function>
  <function name="aero/velocities/prop-ht-ui-fps">
    <product>
      <value> 0.0 </value>
      <property> propulsion/engine/prop-induced-velocity_fps </property>
    </product>
  </function>
  <function name="aero/velocities/wing-ht-zi-fps">
    <product>
      <value> -1.0 </value>
      <property> aero/velocities/wing-zi-fps </property>
      <value> 0.8 </value>
    </product>
  </function>
  <function name="aero/calculated/delta-alpha_ht_elevator-rad">
    <product>
      <value> 0.5 </value>
      <property> fcs/elevator-pos-rad </property>
    </product>
  </function>
  <function name="aero/velocities/U_ht_bf-fps">
    <sum>
      <property> velocities/u-aero-fps </property>
      <product>
        <property> velocities/q-aero-rad_sec </property>
        <property> aero/quantity/z_ht-ft </property>
      </product>
      <product>
        <value> -1.0 </value>
        <property> velocities/r-aero-rad_sec </property>
        <property> aero/quantity/y_ht-ft </property>
      </product>
      <property> aero/velocities/prop-ht-ui-fps </property>
    </sum>
  </function>
  <function name="aero/velocities/V_ht_bf-fps">
    <sum>
      <property> velocities/v-aero-fps </property>
      <product>
        <property> velocities/r-aero-rad_sec </property>
        <property> aero/quantity/x_ht-ft </property>
      </product>
      <product>
        <value> -1.0 </value>
        <property> velocities/p-aero-rad_sec </property>
        <property> aero/quantity/z_ht-ft </property>
      </product>
    </sum>
  </function>
  <function name="aero/velocities/W_ht_bf-fps">
    <sum>
      <property> velocities/w-aero-fps </property>
      <product>
        <property> velocities/p-aero-rad_sec </property>
        <property> aero/quantity/y_ht-ft </property>
      </product>
      <product>
        <value> -1.0 </value>
        <property> velocities/q-aero-rad_sec </property>
        <property> aero/quantity/x_ht-ft </property>
      </product>
      <property> aero/velocities/wing-ht-zi-fps </property>
    </sum>
  </function>
  <function name="aero/velocities/U_ht_wf-fps">
    <sum>
      <product>
        <value> 1.0 </value>
        <property> aero/velocities/U_ht_bf-fps </property>
      </product>
      <product>
        <value> 0.0 </value>
        <property> aero/velocities/V_ht_bf-fps </property>
      </product>
      <product>
        <value> 0.0 </value>
        <property> aero/velocities/W_ht_bf-fps </property>
      </product>
    </sum>
  </function>
  <function name="aero/velocities/W_ht_wf-fps">
    <sum>
      <product>
        <value> 0.0 </value>
        <property> aero/velocities/U_ht_bf-fps </property>
      </product>
      <product>
        <value> 0.0 </value>
        <property> aero/velocities/V_ht_bf-fps </property>
      </product>
      <product>
        <value> 1.0 </value>
        <property> aero/velocities/W_ht_bf-fps </property>
      </product>
    </sum>
  </function>
  <function name="aero/calculated/qbar_ht-psf">
    <product>
      <value> 0.5 </value>
      <property> atmosphere/rho-slugs_ft3 </property>
      <sum>
        <pow>
          <property> aero/velocities/U_ht_wf-fps </property>
          <value> 2 </value>
        </pow>
        <pow>
          <property> aero/velocities/W_ht_wf-fps </property>
          <value> 2 </value>
        </pow>
      </sum>
    </product>
  </function>
  <function name="aero/calculated/alpha_ht-rad">
    <sum>
      <atan2>
        <property> aero/velocities/W_ht_wf-fps </property>
        <property> aero/velocities/U_ht_wf-fps </property>
      </atan2>
      <property> aero/calculated/delta-alpha_ht_elevator-rad </property>
    </sum>
  </function>
  <function name="aero/coefficients/CL_ht">
    <table name="aero/table/CL_ht_alpha">
      <independentVar lookup="row"> aero/calculated/alpha_ht-rad </independentVar>
      <tableData>
-1.57                 0
-0.20491803278688525  -1.0
0.20491803278688525   1.0
1.57                  0
 </tableData>
    </table>
  </function>
  <function name="aero/coefficients/CD-sep_ht">
    <table name="aero/table/CD-sep_ht_alpha">
      <independentVar lookup="row"> aero/calculated/alpha_ht-rad </independentVar>
      <tableData>
-1.57                 1
-0.20491803278688525  0
0.20491803278688525   0
1.57                  1
 </tableData>
    </table>
  </function>
  <function name="aero/coefficients/CD_ht">
    <sum>
      <property> aero/coefficients/CD0_ht </property>
      <product>
        <property> aero/coefficients/k_ht </property>
        <pow>
          <property> aero/coefficients/CL_ht </property>
          <value> 2 </value>
        </pow>
      </product>
      <property> aero/coefficients/CD-sep_ht </property>
    </sum>
  </function>
  <function name="aero/forces/L_ht-lb">
    <product>
      <property> aero/coefficients/CL_ht </property>
      <property> aero/metrics/S_ht-sqft </property>
      <property> aero/calculated/qbar_ht-psf </property>
    </product>
  </function>
  <function name="aero/forces/D_ht-lb">
    <product>
      <property> aero/coefficients/CD_ht </property>
      <property> aero/metrics/S_ht-sqft </property>
      <property> aero/calculated/qbar_ht-psf </property>
    </product>
  </function>
  <function name="aero/forces/X_ht_wf-lb">
    <sum>
      <product>
        <property> aero/forces/L_ht-lb </property>
        <sin>
          <property> aero/calculated/alpha_ht-rad </property>
        </sin>
      </product>
      <product>
        <value> -1.0 </value>
        <property> aero/forces/D_ht-lb </property>
        <cos>
          <property> aero/calculated/alpha_ht-rad </property>
        </cos>
      </product>
    </sum>
  </function>
  <function name="aero/forces/Z_ht_wf-lb">
    <sum>
      <product>
        <value> -1.0 </value>
        <property> aero/forces/L_ht-lb </property>
        <cos>
          <property> aero/calculated/alpha_ht-rad </property>
        </cos>
      </product>
      <product>
        <value> -1.0 </value>
        <property> aero/forces/D_ht-lb </property>
        <sin>
          <property> aero/calculated/alpha_ht-rad </property>
        </sin>
      </product>
    </sum>
  </function>
  <function name="aero/quantity/x_vt-ft">
    <value> -3.8537992125984264 </value>
  </function>
  <function name="aero/quantity/y_vt-ft">
    <value> 0.0 </value>
  </function>
  <function name="aero/quantity/z_vt-ft">
    <value> -0.33464566929133854 </value>
  </function>
  <function name="aero/coefficients/CD0_vt">
    <value> 0.0136 </value>
  </function>
  <function name="aero/coefficients/k_vt">
    <value> 0.0885 </value>
  </function>
  <function name="aero/metrics/S_vt-sqft">
    <value> 1.02330343549576 </value>
  </function>
  <function name="aero/velocities/prop-vt-ui-fps">
    <product>
      <value> 0.0 </value>
      <property> propulsion/engine/prop-induced-velocity_fps </property>
    </product>
  </function>
  <function name="aero/velocities/wing-vt-zi-fps">
    <value> 0.0 </value>
  </function>
  <function name="aero/calculated/delta-alpha_vt_rudder-rad">
    <product>
      <value> 0.7 </value>
      <property> fcs/rudder-pos-rad </property>
    </product>
  </function>
  <function name="aero/velocities/U_vt_bf-fps">
    <sum>
      <property> velocities/u-aero-fps </property>
      <product>
        <property> velocities/q-aero-rad_sec </property>
        <property> aero/quantity/z_vt-ft </property>
      </product>
      <product>
        <value> -1.0 </value>
        <property> velocities/r-aero-rad_sec </property>
        <property> aero/quantity/y_vt-ft </property>
      </product>
      <property> aero/velocities/prop-vt-ui-fps </property>
    </sum>
  </function>
  <function name="aero/velocities/V_vt_bf-fps">
    <sum>
      <property> velocities/v-aero-fps </property>
      <product>
        <property> velocities/r-aero-rad_sec </property>
        <property> aero/quantity/x_vt-ft </property>
      </product>
      <product>
        <value> -1.0 </value>
        <property> velocities/p-aero-rad_sec </property>
        <property> aero/quantity/z_vt-ft </property>
      </product>
    </sum>
  </function>
  <function name="aero/velocities/W_vt_bf-fps">
    <sum>
      <property> velocities/w-aero-fps </property>
      <product>
        <property> velocities/p-aero-rad_sec </property>
        <property> aero/quantity/y_vt-ft </property>
      </product>
      <product>
        <value> -1.0 </value>
        <property> velocities/q-aero-rad_sec </property>
        <property> aero/quantity/x_vt-ft </property>
      </product>
      <property> aero/velocities/wing-vt-zi-fps </property>
    </sum>
  </function>
  <function name="aero/velocities/U_vt_wf-fps">
    <sum>
      <product>
        <value> 1.0 </value>
        <property> aero/velocities/U_vt_bf-fps </property>
      </product>
      <product>
        <value> 0.0 </value>
        <property> aero/velocities/V_vt_bf-fps </property>
      </product>
      <product>
        <value> 0.0 </value>
        <property> aero/velocities/W_vt_bf-fps </property>
      </product>
    </sum>
  </function>
  <function name="aero/velocities/W_vt_wf-fps">
    <sum>
      <product>
        <value> 0.0 </value>
        <property> aero/velocities/U_vt_bf-fps </property>
      </product>
      <product>
        <value> 1.0 </value>
        <property> aero/velocities/V_vt_bf-fps </property>
      </product>
      <product>
        <value> 0.0 </value>
        <property> aero/velocities/W_vt_bf-fps </property>
      </product>
    </sum>
  </function>
  <function name="aero/calculated/qbar_vt-psf">
    <product>
      <value> 0.5 </value>
      <property> atmosphere/rho-slugs_ft3 </property>
      <sum>
        <pow>
          <property> aero/velocities/U_vt_wf-fps </property>
          <value> 2 </value>
        </pow>
        <pow>
          <property> aero/velocities/W_vt_wf-fps </property>
          <value> 2 </value>
        </pow>
      </sum>
    </product>
  </function>
  <function name="aero/calculated/alpha_vt-rad">
    <sum>
      <atan2>
        <property> aero/velocities/W_vt_wf-fps </property>
        <property> aero/velocities/U_vt_wf-fps </property>
      </atan2>
      <property> aero/calculated/delta-alpha_vt_rudder-rad </property>
    </sum>
  </function>
  <function name="aero/coefficients/CL_vt">
    <table name="aero/table/CL_vt_alpha">
      <independentVar lookup="row"> aero/calculated/alpha_vt-rad </independentVar>
      <tableData>
-1.57                 0
-0.20491803278688525  -1.0
0.20491803278688525   1.0
1.57                  0
 </tableData>
    </table>
  </function>
  <function name="aero/coefficients/CD-sep_vt">
    <table name="aero/table/CD-sep_vt_alpha">
      <independentVar lookup="row"> aero/calculated/alpha_vt-rad </independentVar>
      <tableData>
-1.57                 1
-0.20491803278688525  0
0.20491803278688525   0
1.57                  1
 </tableData>
    </table>
  </function>
  <function name="aero/coefficients/CD_vt">
    <sum>
      <property> aero/coefficients/CD0_vt </property>
      <product>
        <property> aero/coefficients/k_vt </property>
        <pow>
          <property> aero/coefficients/CL_vt </property>
          <value> 2 </value>
        </pow>
      </product>
      <property> aero/coefficients/CD-sep_vt </property>
    </sum>
  </function>
  <function name="aero/forces/L_vt-lb">
    <product>
      <property> aero/coefficients/CL_vt </property>
      <property> aero/metrics/S_vt-sqft </property>
      <property> aero/calculated/qbar_vt-psf </property>
    </product>
  </function>
  <function name="aero/forces/D_vt-lb">
    <product>
      <property> aero/coefficients/CD_vt </property>
      <property> aero/metrics/S_vt-sqft </property>
      <property> aero/calculated/qbar_vt-psf </property>
    </product>
  </function>
  <function name="aero/forces/X_vt_wf-lb">
    <sum>
      <product>
        <property> aero/forces/L_vt-lb </property>
        <sin>
          <property> aero/calculated/alpha_vt-rad </property>
        </sin>
      </product>
      <product>
        <value> -1.0 </value>
        <property> aero/forces/D_vt-lb </property>
        <cos>
          <property> aero/calculated/alpha_vt-rad </property>
        </cos>
      </product>
    </sum>
  </function>
  <function name="aero/forces/Z_vt_wf-lb">
    <sum>
      <product>
        <value> -1.0 </value>
        <property> aero/forces/L_vt-lb </property>
        <cos>
          <property> aero/calculated/alpha_vt-rad </property>
        </cos>
      </product>
      <product>
        <value> -1.0 </value>
        <property> aero/forces/D_vt-lb </property>
        <sin>
          <property> aero/calculated/alpha_vt-rad </property>
        </sin>
      </product>
    </sum>
  </function>
  <function name="aero/velocities/fus-u-fps">
    <sum>
      <property> velocities/u-aero-fps </property>
      <product>
        <value> 0.0 </value>
        <property> propulsion/engine/prop-induced-velocity_fps </property>
      </product>
    </sum>
  </function>
  <axis name="X" frame="BODY">
    <function name="aero/forces/X_lw0-lb">
      <sum>
        <product>
          <value> 1.0 </value>
          <property> aero/forces/X_lw0_wf-lb </property>
        </product>
        <product>
          <value> 0.0 </value>
          <property> aero/forces/Z_lw0_wf-lb </property>
        </product>
      </sum>
    </function>
    <function name="aero/forces/X_rw0-lb">
      <sum>
        <product>
          <value> 1.0 </value>
          <property> aero/forces/X_rw0_wf-lb </property>
        </product>
        <product>
          <value> 0.0 </value>
          <property> aero/forces/Z_rw0_wf-lb </property>
        </product>
      </sum>
    </function>
    <function name="aero/forces/X_lw1-lb">
      <sum>
        <product>
          <value> 1.0 </value>
          <property> aero/forces/X_lw1_wf-lb </property>
        </product>
        <product>
          <value> 0.0 </value>
          <property> aero/forces/Z_lw1_wf-lb </property>
        </product>
      </sum>
    </function>
    <function name="aero/forces/X_rw1-lb">
      <sum>
        <product>
          <value> 1.0 </value>
          <property> aero/forces/X_rw1_wf-lb </property>
        </product>
        <product>
          <value> 0.0 </value>
          <property> aero/forces/Z_rw1_wf-lb </property>
        </product>
      </sum>
    </function>
    <function name="aero/forces/X_ht-lb">
      <sum>
        <product>
          <value> 1.0 </value>
          <property> aero/forces/X_ht_wf-lb </property>
        </product>
        <product>
          <value> 0.0 </value>
          <property> aero/forces/Z_ht_wf-lb </property>
        </product>
      </sum>
    </function>
    <function name="aero/forces/X_vt-lb">
      <sum>
        <product>
          <value> 1.0 </value>
          <property> aero/forces/X_vt_wf-lb </property>
        </product>
        <product>
          <value> 0.0 </value>
          <property> aero/forces/Z_vt_wf-lb </property>
        </product>
      </sum>
    </function>
    <function name="aero/forces/X_fus-lb">
      <product>
        <value> -0.5 </value>
        <property> atmosphere/rho-slugs_ft3 </property>
        <value> 0.575 </value>
        <abs>
          <property> aero/velocities/fus-u-fps </property>
        </abs>
        <property> aero/velocities/fus-u-fps </property>
      </product>
    </function>
  </axis>
  <axis name="Y" frame="BODY">
    <function name="aero/forces/Y_lw0-lb">
      <sum>
        <product>
          <value> 0.0 </value>
          <property> aero/forces/X_lw0_wf-lb </property>
        </product>
        <product>
          <value> 0.0 </value>
          <property> aero/forces/Z_lw0_wf-lb </property>
        </product>
      </sum>
    </function>
    <function name="aero/forces/Y_rw0-lb">
      <sum>
        <product>
          <value> 0.0 </value>
          <property> aero/forces/X_rw0_wf-lb </property>
        </product>
        <product>
          <value> 0.0 </value>
          <property> aero/forces/Z_rw0_wf-lb </property>
        </product>
      </sum>
    </function>
    <function name="aero/forces/Y_lw1-lb">
      <sum>
        <product>
          <value> 0.0 </value>
          <property> aero/forces/X_lw1_wf-lb </property>
        </product>
        <product>
          <value> 0.0 </value>
          <property> aero/forces/Z_lw1_wf-lb </property>
        </product>
      </sum>
    </function>
    <function name="aero/forces/Y_rw1-lb">
      <sum>
        <product>
          <value> 0.0 </value>
          <property> aero/forces/X_rw1_wf-lb </property>
        </product>
        <product>
          <value> 0.0 </value>
          <property> aero/forces/Z_rw1_wf-lb </property>
        </product>
      </sum>
    </function>
    <function name="aero/forces/Y_ht-lb">
      <sum>
        <product>
          <value> 0.0 </value>
          <property> aero/forces/X_ht_wf-lb </property>
        </product>
        <product>
          <value> 0.0 </value>
          <property> aero/forces/Z_ht_wf-lb </property>
        </product>
      </sum>
    </function>
    <function name="aero/forces/Y_vt-lb">
      <sum>
        <product>
          <value> 0.0 </value>
          <property> aero/forces/X_vt_wf-lb </property>
        </product>
        <product>
          <value> 1.0 </value>
          <property> aero/forces/Z_vt_wf-lb </property>
        </product>
      </sum>
    </function>
    <function name="aero/forces/Y_fus-lb">
      <product>
        <value> -0.5 </value>
        <property> atmosphere/rho-slugs_ft3 </property>
        <value> 2 </value>
        <abs>
          <property> velocities/v-aero-fps </property>
        </abs>
        <property> velocities/v-aero-fps </property>
      </product>
    </function>
  </axis>
  <axis name="Z" frame="BODY">
    <function name="aero/forces/Z_lw0-lb">
      <sum>
        <product>
          <value> 0.0 </value>
          <property> aero/forces/X_lw0_wf-lb </property>
        </product>
        <product>
          <value> 1.0 </value>
          <property> aero/forces/Z_lw0_wf-lb </property>
        </product>
      </sum>
    </function>
    <function name="aero/forces/Z_rw0-lb">
      <sum>
        <product>
          <value> 0.0 </value>
          <property> aero/forces/X_rw0_wf-lb </property>
        </product>
        <product>
          <value> 1.0 </value>
          <property> aero/forces/Z_rw0_wf-lb </property>
        </product>
      </sum>
    </function>
    <function name="aero/forces/Z_lw1-lb">
      <sum>
        <product>
          <value> 0.0 </value>
          <property> aero/forces/X_lw1_wf-lb </property>
        </product>
        <product>
          <value> 1.0 </value>
          <property> aero/forces/Z_lw1_wf-lb </property>
        </product>
      </sum>
    </function>
    <function name="aero/forces/Z_rw1-lb">
      <sum>
        <product>
          <value> 0.0 </value>
          <property> aero/forces/X_rw1_wf-lb </property>
        </product>
        <product>
          <value> 1.0 </value>
          <property> aero/forces/Z_rw1_wf-lb </property>
        </product>
      </sum>
    </function>
    <function name="aero/forces/Z_ht-lb">
      <sum>
        <product>
          <value> 0.0 </value>
          <property> aero/forces/X_ht_wf-lb </property>
        </product>
        <product>
          <value> 1.0 </value>
          <property> aero/forces/Z_ht_wf-lb </property>
        </product>
      </sum>
    </function>
    <function name="aero/forces/Z_vt-lb">
      <sum>
        <product>
          <value> 0.0 </value>
          <property> aero/forces/X_vt_wf-lb </property>
        </product>
        <product>
          <value> 0.0 </value>
          <property> aero/forces/Z_vt_wf-lb </property>
        </product>
      </sum>
    </function>
    <function name="aero/forces/Z_fus-lb">
      <product>
        <value> -0.5 </value>
        <property> atmosphere/rho-slugs_ft3 </property>
        <value> 2 </value>
        <abs>
          <property> velocities/w-aero-fps </property>
        </abs>
        <property> velocities/w-aero-fps </property>
      </product>
    </function>
  </axis>
  <axis name="ROLL" frame="BODY">
    <function name="aero/moments/L_lw0-ftlb">
      <sum>
        <product>
          <value> -1.0 </value>
          <property> aero/quantity/z_lw0-ft </property>
          <property> aero/forces/Y_lw0-lb </property>
        </product>
        <product>
          <property> aero/quantity/y_lw0-ft </property>
          <property> aero/forces/Z_lw0-lb </property>
        </product>
      </sum>
    </function>
    <function name="aero/moments/L_rw0-ftlb">
      <sum>
        <product>
          <value> -1.0 </value>
          <property> aero/quantity/z_rw0-ft </property>
          <property> aero/forces/Y_rw0-lb </property>
        </product>
        <product>
          <property> aero/quantity/y_rw0-ft </property>
          <property> aero/forces/Z_rw0-lb </property>
        </product>
      </sum>
    </function>
    <function name="aero/moments/L_lw1-ftlb">
      <sum>
        <product>
          <value> -1.0 </value>
          <property> aero/quantity/z_lw1-ft </property>
          <property> aero/forces/Y_lw1-lb </property>
        </product>
        <product>
          <property> aero/quantity/y_lw1-ft </property>
          <property> aero/forces/Z_lw1-lb </property>
        </product>
      </sum>
    </function>
    <function name="aero/moments/L_rw1-ftlb">
      <sum>
        <product>
          <value> -1.0 </value>
          <property> aero/quantity/z_rw1-ft </property>
          <property> aero/forces/Y_rw1-lb </property>
        </product>
        <product>
          <property> aero/quantity/y_rw1-ft </property>
          <property> aero/forces/Z_rw1-lb </property>
        </product>
      </sum>
    </function>
    <function name="aero/moments/L_ht-ftlb">
      <sum>
        <product>
          <value> -1.0 </value>
          <property> aero/quantity/z_ht-ft </property>
          <property> aero/forces/Y_ht-lb </property>
        </product>
        <product>
          <property> aero/quantity/y_ht-ft </property>
          <property> aero/forces/Z_ht-lb </property>
        </product>
      </sum>
    </function>
    <function name="aero/moments/L_vt-ftlb">
      <sum>
        <product>
          <value> -1.0 </value>
          <property> aero/quantity/z_vt-ft </property>
          <property> aero/forces/Y_vt-lb </property>
        </product>
        <product>
          <property> aero/quantity/y_vt-ft </property>
          <property> aero/forces/Z_vt-lb </property>
        </product>
      </sum>
    </function>
    <function name="aero/moments/L_fus-ftlb">
      <sum>
        <product>
          <value> -1.0 </value>
          <value> 0.0 </value>
          <property> aero/forces/Y_fus-lb </property>
        </product>
        <product>
          <value> 0.0 </value>
          <property> aero/forces/Z_fus-lb </property>
        </product>
      </sum>
    </function>
  </axis>
  <axis name="PITCH" frame="BODY">
    <function name="aero/moments/M_lw0-ftlb">
      <sum>
        <product>
          <value> -1.0 </value>
          <property> aero/quantity/x_lw0-ft </property>
          <property> aero/forces/Z_lw0-lb </property>
        </product>
        <product>
          <property> aero/quantity/z_lw0-ft </property>
          <property> aero/forces/X_lw0-lb </property>
        </product>
      </sum>
    </function>
    <function name="aero/moments/M_rw0-ftlb">
      <sum>
        <product>
          <value> -1.0 </value>
          <property> aero/quantity/x_rw0-ft </property>
          <property> aero/forces/Z_rw0-lb </property>
        </product>
        <product>
          <property> aero/quantity/z_rw0-ft </property>
          <property> aero/forces/X_rw0-lb </property>
        </product>
      </sum>
    </function>
    <function name="aero/moments/M_lw1-ftlb">
      <sum>
        <product>
          <value> -1.0 </value>
          <property> aero/quantity/x_lw1-ft </property>
          <property> aero/forces/Z_lw1-lb </property>
        </product>
        <product>
          <property> aero/quantity/z_lw1-ft </property>
          <property> aero/forces/X_lw1-lb </property>
        </product>
      </sum>
    </function>
    <function name="aero/moments/M_rw1-ftlb">
      <sum>
        <product>
          <value> -1.0 </value>
          <property> aero/quantity/x_rw1-ft </property>
          <property> aero/forces/Z_rw1-lb </property>
        </product>
        <product>
          <property> aero/quantity/z_rw1-ft </property>
          <property> aero/forces/X_rw1-lb </property>
        </product>
      </sum>
    </function>
    <function name="aero/moments/M_ht-ftlb">
      <sum>
        <product>
          <value> -1.0 </value>
          <property> aero/quantity/x_ht-ft </property>
          <property> aero/forces/Z_ht-lb </property>
        </product>
        <product>
          <property> aero/quantity/z_ht-ft </property>
          <property> aero/forces/X_ht-lb </property>
        </product>
      </sum>
    </function>
    <function name="aero/moments/M_vt-ftlb">
      <sum>
        <product>
          <value> -1.0 </value>
          <property> aero/quantity/x_vt-ft </property>
          <property> aero/forces/Z_vt-lb </property>
        </product>
        <product>
          <property> aero/quantity/z_vt-ft </property>
          <property> aero/forces/X_vt-lb </property>
        </product>
      </sum>
    </function>
    <function name="aero/moments/M_fus-ftlb">
      <sum>
        <product>
          <value> -1.0 </value>
          <value> 0.0 </value>
          <property> aero/forces/Z_fus-lb </property>
        </product>
        <product>
          <value> 0.0 </value>
          <property> aero/forces/X_fus-lb </property>
        </product>
      </sum>
    </function>
  </axis>
  <axis name="YAW" frame="BODY">
    <function name="aero/moments/N_lw0-ftlb">
      <sum>
        <product>
          <value> -1.0 </value>
          <property> aero/quantity/y_lw0-ft </property>
          <property> aero/forces/X_lw0-lb </property>
        </product>
        <product>
          <property> aero/quantity/x_lw0-ft </property>
          <property> aero/forces/Y_lw0-lb </property>
        </product>
      </sum>
    </function>
    <function name="aero/moments/N_rw0-ftlb">
      <sum>
        <product>
          <value> -1.0 </value>
          <property> aero/quantity/y_rw0-ft </property>
          <property> aero/forces/X_rw0-lb </property>
        </product>
        <product>
          <property> aero/quantity/x_rw0-ft </property>
          <property> aero/forces/Y_rw0-lb </property>
        </product>
      </sum>
    </function>
    <function name="aero/moments/N_lw1-ftlb">
      <sum>
        <product>
          <value> -1.0 </value>
          <property> aero/quantity/y_lw1-ft </property>
          <property> aero/forces/X_lw1-lb </property>
        </product>
        <product>
          <property> aero/quantity/x_lw1-ft </property>
          <property> aero/forces/Y_lw1-lb </property>
        </product>
      </sum>
    </function>
    <function name="aero/moments/N_rw1-ftlb">
      <sum>
        <product>
          <value> -1.0 </value>
          <property> aero/quantity/y_rw1-ft </property>
          <property> aero/forces/X_rw1-lb </property>
        </product>
        <product>
          <property> aero/quantity/x_rw1-ft </property>
          <property> aero/forces/Y_rw1-lb </property>
        </product>
      </sum>
    </function>
    <function name="aero/moments/N_ht-ftlb">
      <sum>
        <product>
          <value> -1.0 </value>
          <property> aero/quantity/y_ht-ft </property>
          <property> aero/forces/X_ht-lb </property>
        </product>
        <product>
          <property> aero/quantity/x_ht-ft </property>
          <property> aero/forces/Y_ht-lb </property>
        </product>
      </sum>
    </function>
    <function name="aero/moments/N_vt-ftlb">
      <sum>
        <product>
          <value> -1.0 </value>
          <property> aero/quantity/y_vt-ft </property>
          <property> aero/forces/X_vt-lb </property>
        </product>
        <product>
          <property> aero/quantity/x_vt-ft </property>
          <property> aero/forces/Y_vt-lb </property>
        </product>
      </sum>
    </function>
    <function name="aero/moments/N_fus-ftlb">
      <sum>
        <product>
          <value> -1.0 </value>
          <value> 0.0 </value>
          <property> aero/forces/X_fus-lb </property>
        </product>
        <product>
          <value> 0.0 </value>
          <property> aero/forces/Y_fus-lb </property>
        </product>
      </sum>
    </function>
  </axis>
</aerodynamics>
